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CPU_f
4^64 = 3.40282e38
SCL_f
SCL_f == CPU_f/(16 + 2*TWBR*4^TWPS) solve, TWBR → (CPU_f/SCL_f - 16)/(2*4^TWPS)
TWPS := 1
SCL_f == CPU_f/(16 + 2*TWBR*4^TWPS) solve, TWBR → CPU_f/(8*SCL_f) - 2
TWPS := 4
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SCL_f == CPU_f/(16 + 2*TWBR*4^TWPS) solve, TWBR, factor → (CPU_f - 16*SCL_f)/(512*SCL_f) =  # error: This variable is undefined. Check that the label is set correctly.
TWPS := 16
SCL_f == CPU_f/(16 + 2*TWBR*4^TWPS) solve, TWBR → CPU_f/(8589934592*SCL_f) - 1/536870912 =  # error
TWPS := 64
SCL_f == CPU_f/(16 + 2*TWBR*4^TWPS) solve, TWBR → CPU_f/(680564733841876926926749214863536422912*SCL_f) - 1/42535295865117307932921825928971026432
